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/batch
! ANSYS input file written by Workbench version 2021 R1
! File used for geometry attach: C:\Users\MonsteR\Documents\Ansys\Example4-3\Example4-3_files\dp0\global\MECH\SYS\AssembledModel\SYS.pmdb
/title,Example4-3--Static Structural (B3)
/com,--- Data in consistent NMM units. See Solving Units in the help system for more information.
/units,MPA
/prep7
! Turn off shape checking because checks already performed inside WB mesher.
! See help system for more information.
SHPP,OFF,,NOWARN
etcon,set             ! allow ANSYS to choose best KEYOP's for 180x elements, resets any applicable keyopt to MAPDL defaults
/com,*********** Nodes for the whole assembly ***********
nblock,3,,7396
(1i9,3e20.9e3)
     1682     5.250000000E+01     5.000000000E+01     0.000000000E+00
     1683     5.250000000E+01     5.250000000E+01     0.000000000E+00
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-1
/com,*********** Elements for Body 1 "SolidModel.1" ***********
et,1,185
keyo,1,3,1          ! set Layer construction
keyo,1,8,1          ! set Layer data storage
eblock,19,solid,,4800
(19i9)
        1        1        1        1        0        0        0        0        8        0     1601     1682     1683     1684     1685     1686     1687     1688     1689
        1        1        1        1        0        0        0        0        8        0     1602     1685     1690     1691     1682     1689     1692     1693     1686
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-1
/com,*********** Send User Defined Coordinate System(s) ***********
csys,0
toffst,273.15,  ! Temperature offset from absolute zero
/com,*********** Set Reference Temperature ***********
tref,22.
/com,*********** Send Materials ***********
MP,DENS,1,1.49e-09,	! tonne mm^-3
MP,EX,1,53780,	! tonne s^-2 mm^-1
MP,EY,1,117930,	! tonne s^-2 mm^-1
MP,EZ,1,10300,	! tonne s^-2 mm^-1
MP,PRXY,1,0.25,
MP,PRYZ,1,0.6,
MP,PRXZ,1,0.27,
MP,GXY,1,8620,	! tonne s^-2 mm^-1
MP,GYZ,1,3000,	! tonne s^-2 mm^-1
MP,GXZ,1,7000,	! tonne s^-2 mm^-1

TB,FCLI,1,1,9,2
TBDATA,1,0.0167,-0.0108,0.0032,-0.0192,0.0032,-0.0192
TBDATA,7,0.012,0.011
MP,ALPX,1,-4.7e-07,	! C^-1
MP,ALPY,1,3e-05,	! C^-1
MP,ALPZ,1,3e-05,	! C^-1

TB,FCLI,1,1,20,1
TBDATA,1,2231
TBDATA,2,-1082
TBDATA,3,29
TBDATA,4,-100
TBDATA,5,29
TBDATA,6,-100
TBDATA,7,60
TBDATA,8,32
TBDATA,9,60
TBDATA,10,-1
TBDATA,11,-1
TBDATA,12,-1
TBDATA,13,0.35
TBDATA,14,0.3
TBDATA,15,0.25
TBDATA,16,0.25


/com,*********** Sending Coordinate Systems for External Layered Section***********
local,12,0,51.2499952309591,51.2500005296709,6.35e-002,9.63643326346279e-016,0.,0.
csys,0

/com,*********** Sending Materials for External Layered Section***********
MP,DENS,2,1.49e-09,	! tonne mm^-3
MP,EX,2,53780,	! tonne s^-2 mm^-1
MP,EY,2,117930,	! tonne s^-2 mm^-1
MP,EZ,2,10300,	! tonne s^-2 mm^-1
MP,PRXY,2,0.25,
MP,PRYZ,2,0.6,
MP,PRXZ,2,0.27,
MP,GXY,2,8620,	! tonne s^-2 mm^-1
MP,GYZ,2,3000,	! tonne s^-2 mm^-1
MP,GXZ,2,7000,	! tonne s^-2 mm^-1

TB,FCLI,2,1,9,2
TBDATA,1,0.0167,-0.0108,0.0032,-0.0192,0.0032,-0.0192
TBDATA,7,0.012,0.011
MP,ALPX,2,-4.7e-07,	! C^-1
MP,ALPY,2,3e-05,	! C^-1
MP,ALPZ,2,3e-05,	! C^-1

TB,FCLI,2,1,20,1
TBDATA,1,2231
TBDATA,2,-1082
TBDATA,3,29
TBDATA,4,-100
TBDATA,5,29
TBDATA,6,-100
TBDATA,7,60
TBDATA,8,32
TBDATA,9,60
TBDATA,10,-1
TBDATA,11,-1
TBDATA,12,-1
TBDATA,13,0.35
TBDATA,14,0.3
TBDATA,15,0.25
TBDATA,16,0.25


/com,*********** Send External Layered Section Properties ***********
CMBLOCK,_CM_EXT_SEC_0,ELEM,     1600
(8i10)
      1601      1602      1603      1604      1605      1606      1607      1608
      1609      1610      1611      1612      1613      1614      1615      1616
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
sectype,3,shell
secdata,0.127,2,0
secoff,mid
emod,_cm_ext_sec_0,secnum,3
emod,1601,esys,12
emod,1602,esys,12
emod,1603,esys,12
emod,1604,esys,12
emod,1605,esys,12
emod,1606,esys,12
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emod,3200,esys,12

CMBLOCK,_CM_EXT_SEC_1,ELEM,     1600
(8i10)
      3201      3202      3203      3204      3205      3206      3207      3208
      3209      3210      3211      3212      3213      3214      3215      3216
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
sectype,4,shell
secdata,1.27,2,90
secoff,mid
emod,_cm_ext_sec_1,secnum,4
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emod,4800,esys,12

CMBLOCK,_CM_EXT_SEC_2,ELEM,     1600
(8i10)
      4801      4802      4803      4804      4805      4806      4807      4808
      4809      4810      4811      4812      4813      4814      4815      4816
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
sectype,5,shell
secdata,0.127,2,0
secoff,mid
emod,_cm_ext_sec_2,secnum,5
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emod,6400,esys,12

!************************* Model Summary ********************
!SolidModel.1,	Epoxy Carbon UD (230 GPa) Prepreg,	matid,	1
!************************* End Model Summary ********************
CMBLOCK,CENTER  ,NODE,        4
(8i10)
      1685      1689      5047      6728
CMBLOCK,EDGES   ,NODE,      640
(8i10)
      4724      4725      4726      4727      4728      4729      4730      4731
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
CMBLOCK,X_HOLD  ,NODE,        8
(8i10)
      4842      4843      5002      5003      6624      6704      8305      8385

/com,*********** Define Force Using Surface Effect Elements ***********
local,13,0,0.,0.,0.,0.,0.,0.
csys,0
et,7,154
eblock,10,,,120
(15i9)
    10081        7        7        7       13     4802     4803     4805     4804
    10082        7        7        7       13     4806     4802     4804     4807
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-1
esel,s,type,,7
keyop,7,2,1                ! Apply load in local coordinate system
keyop,7,7,1                ! Use original area so load is constant in large deformation
esel,all
/com,*********** Define Force Using Surface Effect Elements ***********
local,14,0,0.,0.,0.,0.,0.,0.
csys,0
et,8,154
eblock,10,,,120
(15i9)
    10201        8        8        8       14     4962     4963     4965     4964
    10202        8        8        8       14     4966     4962     4964     4967
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-1
esel,s,type,,8
keyop,8,2,1                ! Apply load in local coordinate system
keyop,8,7,1                ! Use original area so load is constant in large deformation
esel,all
/com,*********** Create Direct FE , Displacements ****
CMBLOCK,_CM48U  ,NODE,        4
(8i10)
      1685      1689      5047      6728
/com,*********** Create Direct FE , Displacements ****
CMBLOCK,_CM283U ,NODE,        8
(8i10)
      4842      4843      5002      5003      6624      6704      8305      8385

/com,*********** Create Direct FE , Displacements ****
CMBLOCK,_CM285U ,NODE,      640
(8i10)
      4724      4725      4726      4727      4728      4729      4730      4731
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
fini
/com,****************************************************************************
/com,*************************    SOLUTION       ********************************
/com,****************************************************************************
/solu
antype,0                   ! static analysis
_thickRatio=  1     ! Ratio of thick parts in the model
eqsl,pcg,1e-8,,,,,,1
cntr,print,1               ! print out contact info and also make no initial contact an error
nldiag,cont,iter           ! print out contact info each equilibrium iteration
rescontrol,,none                 ! Do not keep any restart files
/com,****************************************************
/com,******************* SOLVE FOR LS 1 OF 1 ****************
esel,s,type,,7
nsle
sfe,all,1,pres,1,65.6167979002622
sfe,all,2,pres,1,0.
sfe,all,3,pres,1,0.
esel,s,type,,8
nsle
sfe,all,1,pres,1,-65.6167979002622
sfe,all,2,pres,1,0.
sfe,all,3,pres,1,0.
nsel,all
esel,all
/com,**** Set Direct FE , Displacements ****
d,_CM48U,ux,0.
d,_CM48U,uy,0.
d,_CM48U,uz,0.
/com,**** Set Direct FE , Displacements ****
d,_CM283U,uy,0.
d,_CM283U,uz,0.
/com,**** Set Direct FE , Displacements ****
d,_CM285U,uz,0.
nsub,1,1,1
time,1.
outres,erase
outres,all,none
outres,nsol,all,
outres,rsol,all
outres,eangl,all
outres,etmp,all
outres,veng,all
outres,strs,all,
outres,epel,all,
outres,eppl,all,
outres,cont,all,
! *********** WB SOLVE COMMAND ***********
! check interactive state
*get,ANSINTER_,active,,int
*if,ANSINTER_,ne,0,then
/eof
*endif
solve
/com *************** Write FE CONNECTORS *********
CEWRITE,file,ce,,INTE
/com,****************************************************
/com,*************** FINISHED SOLVE FOR LS 1 *************
*get,_PCGITER,active,,solu,cgiter
/post1
fini
